// COMSOL Multiphysics 4.3 (Build: 233) model "test_particle_tracing_planar.mph"
// Outline of the model tree

Geometry
  geom1 "Geometry 1" (2D, length unit m)
    imp1: Import | filename = /home/karban/xxx.dxf
    fin: Finalize "Form Union"

Materials
  mat1 "Material 1" on domains 1
    def "Basic"
      relpermittivity = 1
  mat2 "Material 2" on domains 4
    def "Basic"
      relpermittivity = 2

Physics
  es: Electrostatics on domains 1, 4
    dependent variable V
    ccn1: ChargeConservation (default)
    zc1: ZeroCharge (default)
    init1: init "Initial Values 1" (default)
    gnd1: Ground on boundaries 4-6, 10
    pot1: ElectricPotential on boundaries 7-9, 11 | V0 = 1e4

Mesh
  mesh1 "Mesh 1" (physics-controlled)
    size: MeshSizeDefault | hauto = 2

Studies
  std1 "Study 1"
    stat: Stationary

Solver configurations
  sol1 "Solver 1" (study std1)
    v1: Variables "Dependent Variables 1"
    s1: Stationary "Stationary Solver 1"
      dDef: Direct
      fc1: FullyCoupled

Datasets
  dset1: Solution | solution = sol1
  part1: Particle | solution = sol1; pgeom = pgeom_cpt; posdof = {mod1.qx, mod1.qy}

Plots
  pg1: PlotGroup2D "Electric potential" | data = dset1
    surf1: Surface | readytoplot = off; expr = V; unit = V
    ptr1: ParticleMass "Particle Tracing with Mass 1"
      fx = es.Ex*partq
      fy = es.Ey*partq
      mass = 9.109e-31
      velstartx = 8e7
      xcoord = 0.01
      ycoord = 0
      edgetol = 0.0001