// COMSOL Multiphysics 4.3 (Build: 151) model "test_rf_axisymmetric.mph"
// Outline of the model tree

Geometry
  geom1 "Geometry 1" (2D axisymmetric, length unit m)
    imp1: Import | filename = /home/karban/xxx.dxf
    pt1: Point | p = {0.92463, -0.20118}
    fin: Finalize "Form Union"

Materials
  mat1 "Material 1" on domains 1

Physics
  rfwe: ElectromagneticWaves "Electromagnetic Waves, Frequency Domain" on domains 1
    dependent variable E = {Er, Ephi, Ez}
    components.components = outofplane
    wee1: WaveEquationElectric (default)
      n_mat = userdef
      n = 1
      epsilonr_mat = userdef
      epsilonr = 1
      mur_mat = userdef
      mur = 1
      sigma_mat = userdef
      sigma = 0
      minput_frequency = freq
    axi1: AxialSymmetry (default)
    pec1: PerfectElectricConductor (default)
    init1: init "Initial Values 1" (default)
    efb1: ElectricField on boundaries 11-14 | E0 = {0, 1, 0}
    imp1: Impedance "Impedance Boundary Condition 1" on boundaries 2, 3, 8-10
      murbnd_mat = userdef
      murbnd = 1
      sigmabnd_mat = userdef
      sigmabnd = 0
      epsilonr_mat = userdef
      epsilonr = 1
    mfb1: MagneticFieldBoundary "Magnetic Field 1" on boundaries 4-7

Mesh
  mesh3 "Mesh 3" (physics-controlled)
    size: MeshSizeDefault | hauto = 1

Studies
  std1 "Study 1"
    freq: Frequency "Frequency Domain" | plist = 10e8; mesh = {geom1, mesh3}

Solver configurations
  sol1 "Solver 1" (study std1)
    v1: Variables "Dependent Variables 1"
    s1: Stationary "Stationary Solver 1" | stol = 1.0E-6
      fcDef: FullyCoupled
      p1: Parametric | pname = freq; plistarr = 10e8; porder = linear
      d1: Direct

Datasets
  dset1: Solution | solution = sol1
  rev1: Revolve2D "Revolution 2D" | data = dset1; genpoints = {{0, 0}, {0, 1}}; startangle = -90; revangle = 225

Derived values
  pev1: EvalPoint "Point Evaluation 1" on points 12 | data = dset1; table = tbl1; expr = rfwe.Ephi

Tables
  tbl1: Table
    // Point Evaluation 1 (rfwe.normE)
    freq | Electric field norm (V/m), Point: 12 | Electric field, z component (V/m), Point: 12 | Electric field, phi component (V/m), Point: 12
    1e+09 | 0.538503 | 0 | 0.538213+0.017671i
  tbl3: Table
    // Surface Integration 1 (rfwe.normE)
    freq | Electric field norm (V*m)
    1e+09 | 1.519

Plots
  pg1: PlotGroup2D "Electric field" | data = dset1
    surf1: Surface | expr = rfwe.Ephi