// COMSOL Multiphysics 4.3 (Build: 151) model "test_magnetic_harmonic_axisymmetric_current.mph"
// Outline of the model tree

Geometry
  geom1 "Geometry 1" (2D axisymmetric, length unit m)
    R1: Rectangle | pos = 0.035,-0.03; size = {0.02, 0.14}
    R2: Rectangle | pos = 0.0,-0.05; size = {0.03, 0.1}
    R3: Rectangle | pos = 0.0,-0.17; size = {0.15, 0.34}
    c1: Circle | pos = {0.06, -0.07}; type = solid; base = center; r = 0.02
    pt1: Point | p = {0.05, -0.07}
    pt2: Point | p = {0.02, -0.04}
    fin: Finalize "Form Union"

Physics
  emqa: InductionCurrents "Magnetic Fields" on all domains
    dependent variable A = {Ar, Aphi, Az}
    al1: AmperesLaw "Ampère's Law 1" (default)
      sigma_mat = userdef
      sigma = 5e3
      epsilonr_mat = userdef
      epsilonr = 1
      mur_mat = userdef
      mur = diag{50, 1, 50}
      normH_mat = userdef
      normH = 1/mu0_const*emqa.normB
      minput_frequency = freq
    axi1: AxialSymmetry (default)
    mi1: MagneticInsulation (default)
    init1: init "Initial Values 1" (default)
    al2: AmperesLaw "Ampère's Law 2" on domains 1, 3
      sigma_mat = userdef
      sigma = 0
      epsilonr_mat = userdef
      epsilonr = 1
      mur_mat = userdef
      mur = 1
      normH_mat = userdef
      normH = 1/mu0_const*emqa.normB
      minput_frequency = freq
    ecd1: ExternalCurrentDensity on domains 3 | Je = {0, 1e6, 0}
    al3: AmperesLaw "Ampère's Law 3" on domains 4
      sigma_mat = userdef
      sigma = 1e6
      epsilonr_mat = userdef
      epsilonr = 1
      ConstitutiveRelationH = RelativePermeability
      mur_mat = userdef
      mur = 1
      normH_mat = userdef
      normH = 1/mu0_const*emqa.normB
      minput_frequency = freq
    cgd1: CoilGroupDomain on domains 4 | ICoil = 5000+20000i[A]

Mesh
  mesh2 "Mesh 2"
    size: MeshSizeDefault | hmax = 0.0025; hauto = 5
    ftri1: FreeTri "Free Triangular 1" on remaining entities

Studies
  std1 "Study 1"
    freq: Frequency "Frequency Domain" | plist = 100; mesh = {geom1, mesh2}

Solver configurations
  sol1 "Solver 1" (study std1)
    v1: Variables "Dependent Variables 1"
    s1: Stationary "Stationary Solver 1" | stol = 1.0E-6
      fcDef: FullyCoupled
      p1: Parametric | pname = freq; plistarr = 100; porder = linear
      d1: Direct

Datasets
  dset1: Solution | solution = sol1
  rev1: Revolve2D "Revolution 2D 1" | data = dset1; genpoints = {{0, 0}, {0, 1}}; startangle = -90; revangle = 225

Derived values
  int1: IntSurface "Surface Integration 1" on domains 4 | data = dset1; table = tbl1; expr = emqa.Qrh
  pev1: EvalPoint "Point Evaluation 1" on points 11 | data = dset1; table = tbl2; expr = emqa.FLtzz

Tables
  tbl1: Table
    // Surface Integration 1 (emqa.Jphi)
    freq | Current density, phi component (A) | Current density, phi component (A) | Induced current density, phi component (A) | External current density, phi component (A) | External current density, phi component (A) | Current density, phi component (A) | Current density, phi component (A) | External current density, phi component (A) | External current density, phi component (A) | Induced current density, phi component (A) | Total magnetic energy (m^4*kg/s^2)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
    100 | 1+3i | 5000+20000i | 213.269-54.7832i | 4786.73+20054.8i | 212.336+21362.8i | 5000+20000i | 5000+20000i | 212.336+21362.8i | 212.336+21362.8i | 4787.66-1362.83i | 0.0152405
  tbl2: Table
    // Point Evaluation 1 (emqa.normB)
    freq | Magnetic flux density norm (T), Point: 11 | Magnetic vector potential, phi component (Wb/m), Point: 11 | abs(Aphi) (Wb/m), Point: 11 | abs(Aphi) (Wb/m), Point: 11 | Magnetic vector potential, phi component (Wb/m), Point: 11 | Magnetic flux density, r component (T), Point: 11 | Magnetic flux density, z component (T), Point: 11 | Magnetic vector potential, phi component (Wb/m), Point: 11 | Magnetic vector potential, phi component (Wb/m), Point: 11 | Magnetic vector potential, phi component (Wb/m), Point: 5 | Magnetic field, r component (A/m), Point: 5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
    100 | 6.19088 | 0.0223953+0.087657i | 0.0904727 | 0.00727042 | 0.0019392+0.00700703i | -0.0138694-0.0242023i | 0.0558365+0.181558i | 0.0019392+0.00700703i | 0.0019392+0.00700703i | 0.00146198+0.00377879i | -587.52-634.217i

Plots
  pg2: PlotGroup2D "Magnetic flux density norm" | data = dset1
    surf1: Surface | readytoplot = on; expr = Aphi; unit = Wb/m