// COMSOL Multiphysics 4.3 (Build: 233) model "test_magnetic_harmonic_planar.mph"
// Outline of the model tree

Geometry
  geom1 "Geometry 1" (2D, length unit m)
    R1: Rectangle | pos = 0.01,-0.03; size = {0.02, 0.02}
    R2: Rectangle | pos = 0.0,0.0; base = center; size = {0.15, 0.12}
    R3: Rectangle | pos = 0.0050,0.0; size = {0.01, 0.02}
    R4: Rectangle | pos = -0.015,-0.01; size = {0.01, 0.02}
    fin: Finalize "Form Union"

Physics
  qa: InductionCurrents "Magnetic Fields" on all domains
    dependent variable A = {Ax, Ay, Az}
    al1: AmperesLaw "Ampère's Law 1" (default)
      sigma_mat = userdef
      sigma = 0
      epsilonr_mat = userdef
      epsilonr = 1
      ConstitutiveRelationH = RemanentFluxDensity
      Br = {0.1*cos(20/180*pi), 0.1*sin(20/180*pi), 0}
      mur_mat = userdef
      mur = diag{1.1, 1.1, 1}
      normH_mat = userdef
      normH = 1/mu0_const*qa.normB
      minput_frequency = freq
    mi1: MagneticInsulation (default)
    init1: init "Initial Values 1" (default)
    al2: AmperesLaw "Ampère's Law 2" on domains 1
      sigma_mat = userdef
      sigma = 0
      epsilonr_mat = userdef
      epsilonr = 1
      mur_mat = userdef
      mur = 1
      normH_mat = userdef
      normH = 1/mu0_const*qa.normB
      minput_frequency = freq
    al3: AmperesLaw "Ampère's Law 3" on domains 2, 3
      sigma_mat = userdef
      sigma = 57e6
      epsilonr_mat = userdef
      epsilonr = 1
      mur_mat = userdef
      mur = 1
      normH_mat = userdef
      normH = 1/mu0_const*qa.normB
      minput_frequency = freq
    ecd1: ExternalCurrentDensity on domains 2 | Je = {0, 0, 3e7}
    ecd2: ExternalCurrentDensity on domains 3 | Je = {0, 0, 2e7}

Mesh
  mesh1 "Mesh 1"
    size: MeshSizeDefault | hmax = 0.0101; hmin = 4.5E-5; hcurve = 0.3; hnarrow = 1; hgrad = 1.3; hauto = 5
    obj: MeshObject | filename = $FILENAME$_mesh1_obj.mphbin
  mesh2 "Mesh 2"
    size: MeshSizeDefault | hmax = 0.0101; hmin = 4.5E-5; hcurve = 0.3; hnarrow = 1; hgrad = 1.3; hauto = 5
    ftri1: FreeTri "Free Triangular 1" on remaining entities

Studies
  std1 "Study 1"
    freq: Frequency "Frequency Domain" | plist = 50; mesh = {geom1, mesh1}

Solver configurations
  sol1 "Solver 1" (study std1)
    v1: Variables "Dependent Variables 1"
    s1: Stationary "Stationary Solver 1" | stol = 1.0E-6
      fcDef: FullyCoupled
      p1: Parametric | pname = freq; plistarr = 50; porder = linear
      d1: Direct
  sol2 "COMSOL 3.5a Solution" (study std1)

Datasets
  dset1: Solution | solution = sol1
  dset2: Solution | solution = sol2

Plots
  pg1: PlotGroup2D "2D Plot Group 1" | data = dset2
    surf1: Surface | expr = qa.FLtzavx; unit = N/m^3