// COMSOL Multiphysics 4.3 (Build: 233) model "test_electrostatic_planar.mph"
// Outline of the model tree

Geometry
  geom1 "Geometry 1" (2D, length unit m)
    CO1: Composite "Composite Object 1" | filename = $FILENAME$_geom1_CO1.mphbin
    fin: Finalize "Form Union"

Physics
  emes: Electrostatics on domains 1, 2, 4
    dependent variable V
    ccn1: ChargeConservation (default) | epsilonr_mat = userdef; epsilonr = diag{10, 10, 1}
    zc1: ZeroCharge (default)
    init1: init "Initial Values 1" (default)
    ccn2: ChargeConservation on domains 1 | epsilonr_mat = userdef; epsilonr = diag{3, 3, 1}
    ccn3: ChargeConservation on domains 2 | epsilonr_mat = userdef; epsilonr = 1
    scd1: SpaceChargeDensity on domains 4 | rhoq = 4e-10
    gnd1: Ground on boundaries 2
    pot1: ElectricPotential on boundaries 6-9 | V0 = 1000
    fcal1: ForceCalculation on domains 4

Mesh
  mesh1 "Mesh 1"
    size: MeshSizeDefault | hmax = 0.2; hauto = 1; custom = on
    ftri1: FreeTri "Free Triangular 1" on remaining entities
      xscale = 1
      yscale = 1
      smoothcontrol = on
      smoothmaxiter = 8
      smoothmaxdepth = 8

Studies
  std1 "Study 1"
    stat: Stationary | mesh = {geom1, mesh1}

Solver configurations
  sol1 "Solver 1" (study std1)
    v1: Variables "Dependent Variables 1"
    s1: Stationary "Stationary Solver 1" | stol = 1.0E-6
      fc1: FullyCoupled | initstep = 1.0; minstep = 1.0e-4; rstep = 10.0
      d1: Direct
  sol2 "COMSOL 3.5a Solution" (study std1)

Datasets
  dset1: Solution | solution = sol1
  dset2: Solution | solution = sol2

Derived values
  gev1: EvalGlobal "Global Evaluation 1" | data = dset1; table = tbl1; expr = emes.Forcey_0

Tables
  tbl1: Table
    // Global Evaluation 1 (emes.Forcex_0)
    Electromagnetic force, x component (N) | Electromagnetic force, y component (N)
    7.59251e-08 | -5.54653e-07

Plots
  pg1: PlotGroup2D "Electric potential" | data = dset1
    surf1: Surface | readytoplot = off; expr = V; unit = V