// COMSOL Multiphysics 4.3 (Build: 151) model "test_heat_transfer_transient_axisymmetric.mph"
// Outline of the model tree

Variables
  var1 "Variables 1a"
    Q_fun = 2e5*(t<4900)

Geometry
  geom1 "Geometry 1" (2D axisymmetric, length unit m)
    CO2: Composite "Composite Object 2" | filename = $FILENAME$_geom1_CO2.mphbin
    CO3: Composite "Composite Object 3" | filename = $FILENAME$_geom1_CO3.mphbin
    CO4: Composite "Composite Object 4" | filename = $FILENAME$_geom1_CO4.mphbin
    CO5: Composite "Composite Object 5" | filename = $FILENAME$_geom1_CO5.mphbin
    CO6: Composite "Composite Object 6" | filename = $FILENAME$_geom1_CO6.mphbin
    pt1: Point | p = {0.00503, 0.134283}
    fin: Finalize "Form Union"

Physics
  htgh: HeatTransferWithSurfaceToSurface "Heat Transfer in Solids" on all domains
    dependent variable T
    solid1: SolidHeatTransferModel "Heat Transfer in Solids 1" (default)
      k_mat = userdef
      k = diag{200, 0, 200}
      rho_mat = userdef
      rho = 8700
      Cp_mat = userdef
      Cp = 385
      opq1: Opaque on all domains
    axi1: AxialSymmetry (default)
    ins1: ThermalInsulation (default)
    init1: init "Initial Values 1" (default) | T = 20
    solid2: SolidHeatTransferModel "Heat Transfer in Solids 2" on domains 1, 3
      k_mat = userdef
      k = diag{60, 0, 60}
      rho_mat = userdef
      rho = 7800
      Cp_mat = userdef
      Cp = 460
      opq1: Opaque on all domains
    solid3: SolidHeatTransferModel "Heat Transfer in Solids 3" on domains 2
      k_mat = userdef
      k = diag{0.02, 0, 0.02}
      rho_mat = userdef
      rho = 1.2
      Cp_mat = userdef
      Cp = 1000
      opq1: Opaque on all domains
    solid4: SolidHeatTransferModel "Heat Transfer in Solids 4" on domains 4
      k_mat = userdef
      k = diag{100, 0, 100}
      rho_mat = userdef
      rho = 8400
      Cp_mat = userdef
      Cp = 378
      opq1: Opaque on all domains
    hs1: HeatSource on domains 5 | Q = Q_fun
    hf1: HeatFluxBoundary "Heat Flux 1" on boundaries 2, 7, 8, 10, 15, 21, 27
      HeatFluxType = InwardHeatFlux
      h = 10
      Text = 20

Mesh
  mesh2 "Mesh 2"
    size: MeshSizeDefault | hauto = 1
    ftri1: FreeTri "Free Triangular 1" on remaining entities

Studies
  std1 "Study 1"
    time: Transient "Time Dependent" | tlist = range(0,500,10000); mesh = {geom1, mesh2}

Solver configurations
  sol1 "Solver 1" (study std1)
    v1: Variables "Dependent Variables 1"
    t1: Time "Time-Dependent Solver 1" | tlist = range(0,500,10000); atolglobalmethod = unscaled; estrat = exclude
      d1: Direct
  sol2 "COMSOL 3.5a Solution" (study std1)

Datasets
  dset1: Solution | solution = sol1
  dset2: Solution | solution = sol2
  rev1: Revolve2D "Revolution 2D 1" | data = dset1; genpoints = {{0, 0}, {0, 1}}; startangle = -90; revangle = 225

Derived values
  pev1: EvalPoint "Point Evaluation 1" on points 5 | data = dset1; table = tbl1; expr = htgh.tfluxz
  int1: IntSurface "Surface Integration 1" on domains 2 | data = dset1; table = tbl2; expr = T; intvolume = on
  int2: IntVolume "Volume Integration 2" | data = rev1; expr = T
  int3: IntLine "Line Integration 3" on boundaries 15 | data = dset1; table = tbl3; expr = htgh.q0

Tables
  tbl1: Table
    // Point Evaluation 1 (T)
    Time | Temperature (K), Point: 5 | Temperature (K), Point: 5 | Total heat flux magnitude (W/m^2), Point: 5 | Total heat flux, r component (W/m^2), Point: 5 | Total heat flux, z component (W/m^2), Point: 5
    0 | 20 | 20 | 1.49839e-13 | -5.09317e-14 | -5.45697e-14
    500 | 38.2426 | 38.2797 | 45.3144 | -20.8177 | -40.2484
    1000 | 55.395 | 55.4644 | 74.0913 | -34.0033 | -65.8261
    1500 | 71.2376 | 71.3272 | 91.8745 | -42.1754 | -81.62
    2000 | 85.7914 | 85.902 | 102.88 | -47.254 | -91.3838
    2500 | 99.114 | 99.248 | 109.644 | -50.3942 | -97.3747
    3000 | 111.292 | 111.448 | 113.799 | -52.3399 | -101.046
    3500 | 122.419 | 122.588 | 116.423 | -53.5828 | -103.357
    4000 | 132.589 | 132.761 | 118.396 | -54.5248 | -105.091
    4500 | 141.887 | 142.054 | 119.743 | -55.1771 | -106.27
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  tbl2: Table
    // Surface Integration 1 (T)
    Time | Temperature (m^2*K) | Temperature (m^3*K) | Temperature (m^3*K)
    0 | 0.03885 | 0.00427178 | 0.00142996
    500 | 0.0905957 | 0.00996142 | 0.00250422
    1000 | 0.134248 | 0.0147612 | 0.00350267
    1500 | 0.171423 | 0.0188487 | 0.0044228
    2000 | 0.203684 | 0.0223959 | 0.00526922
    2500 | 0.232047 | 0.0255146 | 0.00604627
    3000 | 0.257253 | 0.0282861 | 0.0067588
    3500 | 0.279853 | 0.0307711 | 0.00741151
    4000 | 0.300341 | 0.0330238 | 0.0080094
    4500 | 0.318896 | 0.035064 | 0.00855697
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  tbl3: Table
    // Line Integration 3 (htgh.tfluxMag)
    Time | Total heat flux magnitude (W/m) | Total heat flux, z component (W/m) | Temperature (m*K) | Inward heat flux (W/m)
    0 | 2.56995e-12 | 4.82483e-13 | 0.09 | -4.44089e-17
    500 | 0.295421 | -0.0820894 | 0.0978306 | -0.0783064
    1000 | 0.691583 | -0.260113 | 0.114824 | -0.248244
    1500 | 1.14632 | -0.496974 | 0.13744 | -0.4744
    2000 | 1.61793 | -0.761947 | 0.162744 | -0.727438
    2500 | 2.0823 | -1.03629 | 0.188946 | -0.989463
    3000 | 2.52603 | -1.30812 | 0.214911 | -1.24911
    3500 | 2.94172 | -1.56982 | 0.239911 | -1.49911
    4000 | 3.32437 | -1.81548 | 0.263381 | -1.73381
    4500 | 3.67778 | -2.04607 | 0.285412 | -1.95412
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
Plots
  pg1: PlotGroup2D "2D Plot Group 1" | data = dset2
    surf1: Surface | data = dset1; expr = T
  pg2: PlotGroup3D "Temperature, 3D (htgh)" | data = rev1
    surf1: Surface | expr = T
  pg3: PlotGroup2D "Isothermal Contours (htgh)" | data = dset1
    con1: Contour | expr = T
    arws1: ArrowSurface | expr = {htgh.tfluxr, htgh.tfluxz}
  pg4: PlotGroup2D "Radiosity (htgh)" | data = dset1
    line1: Line | expr = root.mod1.J