// COMSOL Multiphysics 4.3 (Build: 233) model "test_magnetic_harmonic_axisymmetric_current.mph"
// Outline of the model tree

Geometry
  geom1 "Geometry 1" (2D axisymmetric, length unit m)
    R1: Rectangle | pos = 0.035,-0.03; size = {0.02, 0.14}
    R2: Rectangle | pos = 0.0,-0.05; size = {0.03, 0.1}
    R3: Rectangle | pos = 0.0,-0.17; size = {0.15, 0.34}
    c1: Circle | pos = {0.06, -0.07}; type = solid; base = center; r = 0.02
    pt1: Point | p = {0.05, -0.07}
    pt2: Point | p = {0.02, -0.04}
    fin: Finalize "Form Union"

Physics
  emqa: InductionCurrents "Magnetic Fields" on all domains
    dependent variable A = {Ar, Aphi, Az}
    al1: AmperesLaw "Ampère's Law 1" (default)
      sigma_mat = userdef
      sigma = 5e3
      epsilonr_mat = userdef
      epsilonr = 1
      mur_mat = userdef
      mur = diag{50, 1, 50}
      normH_mat = userdef
      normH = 1/mu0_const*emqa.normB
      minput_frequency = freq
    axi1: AxialSymmetry (default)
    mi1: MagneticInsulation (default)
    init1: init "Initial Values 1" (default)
    al2: AmperesLaw "Ampère's Law 2" on domains 1, 3
      sigma_mat = userdef
      sigma = 0
      epsilonr_mat = userdef
      epsilonr = 1
      mur_mat = userdef
      mur = 1
      normH_mat = userdef
      normH = 1/mu0_const*emqa.normB
      minput_frequency = freq
    ecd1: ExternalCurrentDensity on domains 3 | Je = {0, 1e6, 0}
    al3: AmperesLaw "Ampère's Law 3" on domains 4
      sigma_mat = userdef
      sigma = 1e6
      epsilonr_mat = userdef
      epsilonr = 1
      ConstitutiveRelationH = RelativePermeability
      mur_mat = userdef
      mur = 1
      normH_mat = userdef
      normH = 1/mu0_const*emqa.normB
      minput_frequency = freq
    cgd1: CoilGroupDomain on domains 4 | ICoil = 5000+20000i[A]

Mesh
  mesh2 "Mesh 2"
    size: MeshSizeDefault | hmax = 0.0025; hauto = 5
    ftri1: FreeTri "Free Triangular 1" on remaining entities

Studies
  std1 "Study 1"
    freq: Frequency "Frequency Domain" | plist = 100; mesh = {geom1, mesh2}

Solver configurations
  sol1 "Solver 1" (study std1)
    v1: Variables "Dependent Variables 1"
    s1: Stationary "Stationary Solver 1" | stol = 1.0E-6
      fcDef: FullyCoupled
      p1: Parametric | pname = freq; plistarr = 100; porder = linear
      d1: Direct

Datasets
  dset1: Solution | solution = sol1
  rev1: Revolve2D "Revolution 2D 1" | data = dset1; genpoints = {{0, 0}, {0, 1}}; startangle = -90; revangle = 225

Derived values
  int1: IntSurface "Surface Integration 1" on domains 4 | data = dset1; table = tbl1; expr = emqa.FLtzavz; intvolume = on
  pev1: EvalPoint "Point Evaluation 1" on points 11 | data = dset1; table = new; expr = emqa.Qrh

Tables
  tbl1: Table
    // Surface Integration 1 (emqa.Qrh)
    freq | Resistive losses (W) | Lorentz force contribution, time average, r component (N) | Lorentz force contribution, time average, z component (N)
    100 | 61996.8 | 271.739+24.3318i | 79.0413+25.2663i

Plots
  pg2: PlotGroup2D "Magnetic flux density norm" | data = dset1
    surf1: Surface | readytoplot = on; expr = Aphi; unit = Wb/m