// COMSOL Multiphysics 4.3 (Build: 151) model "test_magnetic_harmonic_axisymmetric_nonlin.mph"
// Outline of the model tree

Functions
  int1: Interpolation
    funcname = mur_nonlin
    table = 
      {0, 13001}
      {0.227065, 13001}
      {0.45413, 13001}
      {0.681195, 12786}
      {0.90826, 12168}
      {1.13533, 10967}
      {1.36239, 7494}
      {1.58935, 1409}
      {1.81236, 315}
      {2.01004, 90}
      {2.13316, 41}
      {2.19999, 26}
      {2.25479, 19}
      {2.29993, 15}
      {2.34251, 12}
      {2.37876, 11}
      {2.41501, 9}
      {2.45126, 8}
      {2.4875, 8}
      {2.52375, 7}
      {2.56, 6}
      {3, 4}
      {5, 3}
      {10, 3}
      {20, 2}

Geometry
  geom1 "Geometry 1" (2D axisymmetric, length unit m)
    c1: Circle | pos = {7e-3, 0}; type = solid; base = center; r = 3e-3
    pt1: Point | p = {0.0051, -0.0003}
    pt2: Point | p = {0.0043, -2.0E-4}
    fin: Finalize "Form Union"

Physics
  mf: InductionCurrents "Magnetic Fields" on all domains
    dependent variable A = {Ar, Aphi, Az}
    al1: AmperesLaw "Ampère's Law 1" (default)
      sigma_mat = userdef
      sigma = 5e6
      epsilonr_mat = userdef
      epsilonr = 1
      mur_mat = userdef
      mur = mur_nonlin(mf.normB)
    axi1: AxialSymmetry (default)
    mi1: MagneticInsulation (default)
    init1: init "Initial Values 1" (default) | A = {0, r^2+z^2, 0}
    ecd1: ExternalCurrentDensity on domains 1 | Je = {0, 1e6, 0}

Mesh
  mesh1 "Mesh 1" (physics-controlled)
    size: MeshSizeDefault | hauto = 2

Studies
  std1 "Study 1"
    freq: Frequency "Frequency Domain" | plist = 50

Solver configurations
  sol1 "Solver 1" (study std1)
    v1: Variables "Dependent Variables 1"
    s1: Stationary "Stationary Solver 1" | stol = 0.00010
      dDef: Direct
      p1: Parametric | pname = freq; plistarr = 50
      fc1: FullyCoupled | maxiter = 300

Datasets
  dset1: Solution | solution = sol1
  rev1: Revolve2D "Revolution 2D 1" | data = dset1; genpoints = {{0, 0}, {0, 1}}; startangle = -90; revangle = 225

Derived values
  pev1: EvalPoint "Point Evaluation 1" on points 2 | data = dset1; table = tbl1; expr = mf.normB
  int1: IntVolume "Volume Integration 1" | data = rev1; expr = mf.normB
  int2: IntSurface "Surface Integration 2" on domains 1 | data = dset1; table = tbl2; expr = mf.Jiphi

Tables
  tbl1: Table
    // Point Evaluation 1 (mf.normB)
    freq | Magnetic flux density norm (T), Point: 2 | Magnetic flux density norm (T), Point: 2 | Relative permeability, phiphi component (1), Point: 2 | Current density, phi component (A/m^2), Point: 2 | Magnetic flux density norm (T), Point: 2 | Magnetic flux density norm (T), Point: 2 | Relative permeability, phiphi component (1), Point: 2 | Current density, phi component (A/m^2), Point: 2 | Current density, phi component (A/m^2), Point: 2 | Relative permeability, phiphi component (1), Point: 2 | Magnetic flux density norm (T), Point: 2
    50 | 0.609324 | 0.609324 | 12854.1 | -141843-129996i | 0.609786 | 0.102389 | 13001 | -49436.7+4043.92i | 484674-356932i | 7425.72 | 1.36494
  tbl2: Table
    // Surface Integration 2 (mf.intWm)
    freq | Total magnetic energy (m^4*kg/s^2) | Induced current density, phi component (A) | Total magnetic energy (m^4*kg/s^2) | Magnetic energy density time average (J/m) | Current density, phi component (A) | Induced current density, phi component (A)
    50 | 1.92366e-09 | -32.9505-6.50704i | 1.92366e-09 | 0.0015746 | 4.4676-3.32368i | -23.8067-3.32368i

Plots
  pg1: PlotGroup2D "Magnetic flux density norm" | data = dset1
    surf1: Surface | readytoplot = on; expr = mf.normB; unit = T