// COMSOL Multiphysics 4.3 (Build: 151) model "test_magnetic_harmonic_planar_current.mph"
// Outline of the model tree

Geometry
  geom1 "Geometry 1" (2D, length unit m)
    R1: Rectangle | pos = 0.01,-0.03; size = {0.02, 0.02}
    R2: Rectangle | pos = 0.0,0.0; base = center; size = {0.15, 0.12}
    R3: Rectangle | pos = 0.0050,0.0; size = {0.01, 0.02}
    R4: Rectangle | pos = -0.015,-0.01; size = {0.01, 0.02}
    c1: Circle | pos = {-0.01, 0.03}; type = solid; base = center; r = 0.01
    pt1: Point | p = {0.0116, 0.0132}; objSelection: pt1(1) entities all
    pt2: Point | p = {-0.0123, 0.00536}
    pt3: Point | p = {-0.0042, 0.03236}
    fin: Finalize "Form Union"

Physics
  qa: InductionCurrents "Magnetic Fields" on all domains
    dependent variable A = {Ax, Ay, Az}
    al1: AmperesLaw "Ampère's Law 1" (default)
      sigma_mat = userdef
      sigma = 0
      epsilonr_mat = userdef
      epsilonr = 1
      ConstitutiveRelationH = RemanentFluxDensity
      Br = {0.1*cos(20/180*pi), 0.1*sin(20/180*pi), 0}
      mur_mat = userdef
      mur = diag{1.1, 1.1, 1}
      normH_mat = userdef
      normH = 1/mu0_const*qa.normB
      minput_frequency = freq
    mi1: MagneticInsulation (default)
    init1: init "Initial Values 1" (default)
    al2: AmperesLaw "Ampère's Law 2" on domains 1
      sigma_mat = userdef
      sigma = 0
      epsilonr_mat = userdef
      epsilonr = 1
      mur_mat = userdef
      mur = 1
      normH_mat = userdef
      normH = 1/mu0_const*qa.normB
      minput_frequency = freq
    al3: AmperesLaw "Ampère's Law 3" on domains 2, 3, 5
      sigma_mat = userdef
      sigma = 57e6
      epsilonr_mat = userdef
      epsilonr = 1
      mur_mat = userdef
      mur = 1
      normH_mat = userdef
      normH = 1/mu0_const*qa.normB
      minput_frequency = freq
    ecd1: ExternalCurrentDensity on domains 2 | Je = {0, 0, 3e7+1e7i}
    cgd1: CoilGroupDomain on domains 3 | ICoil = 1e4+1e4i
    cgd2: CoilGroupDomain on domains 5 | ICoil = 0
    ecd2: ExternalCurrentDensity on domains 3 | Je = {0, 0, 2e7-1e7i}

Mesh
  mesh2 "Mesh 2"
    size: MeshSizeDefault | hmax = 0.0101; hmin = 4.5E-5; hcurve = 0.3; hnarrow = 1; hgrad = 1.3; hauto = 5
    ftri1: FreeTri "Free Triangular 1" on remaining entities
  mesh3 "Mesh 3"
    size: MeshSizeDefault | hmax = 0.0016; hauto = 5
    auto_f1: FreeTri "Free Triangular 1a" on remaining entities
      xscale = 1
      yscale = 1
      smoothcontrol = on
      smoothmaxiter = 8
      smoothmaxdepth = 8

Studies
  std1 "Study 1"
    freq: Frequency "Frequency Domain" | plist = 50; mesh = {geom1, mesh3}

Solver configurations
  sol1 "Solver 1" (study std1)
    v1: Variables "Dependent Variables 1"
    s1: Stationary "Stationary Solver 1" | stol = 1.0E-6
      fcDef: FullyCoupled
      p1: Parametric | pname = freq; plistarr = 50; porder = linear
      d1: Direct
  sol2 "COMSOL 3.5a Solution" (study std1)

Datasets
  dset1: Solution | solution = sol1
  dset2: Solution | solution = sol2
  rev1: Revolve2D "Revolution 2D 1" | data = dset1; genpoints = {{0, 0}, {0, 1}}; startangle = -90; revangle = 225

Derived values
  int1: IntSurface "Surface Integration 1" on domains 5 | data = dset1; table = tbl1; expr = qa.Jiz
  pev1: EvalPoint "Point Evaluation 1" on points 17 | data = dset1; table = tbl2; expr = qa.Qrh

Tables
  tbl1: Table
    // Surface Integration 1 (qa.normB)
    freq | Magnetic flux density norm (Wb) | Current density, z component (A) | Current density, z component (A) | Current density, z component (A) | Current density, z component (A) | Current density, z component (A) | Current density, z component (A) | Current density, z component (A) | Current density, z component (A) | External current density, z component (A) | Induced current density, z component (A)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
    50 | 0 | 0 | 5-1.68504e-13i | 5-1.68504e-13i | 10-1.59314e-12i | 3.41582e-12-3.14165e-13i | -143.328-3629.1i | 5000-9.14829e-12i | 10000+10000i | 334.227+28117.9i | 9665.77-18117.9i
  tbl2: Table
    // Point Evaluation 1 (qa.Jz)
    freq | Current density, z component (A/m^2), Point: 11 | Induced current density, z component (A/m^2), Point: 11 | Magnetic flux density, x component (T), Point: 11 | Magnetic flux density, y component (T), Point: 11 | Magnetic flux density, y component (T), Point: 6 | Magnetic flux density, x component (T), Point: 6 | Current density, z component (A/m^2), Point: 6 | Induced current density, z component (A/m^2), Point: 6 | Magnetic flux density, x component (T), Point: 6 | Current density, z component (A/m^2), Point: 6 | Current density, z component (A/m^2), Point: 6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
    50 | 2.9289e+06-2.80485e+06i | 9.1114e+06-3.67554e+07i | -0.0782186+0.0114485i | -0.044382-0.0269882i | -0.0953393+0.0220104i | 0.020835+0.078977i | 1.32003e+06-3.83928e+07i | -2.868e+07-4.83928e+07i | 0.020835+0.078977i | 1.32003e+06-3.83928e+07i | 1.32003e+06-3.83928e+07i

Plots
  pg1: PlotGroup2D "2D Plot Group 1" | data = dset2
    surf1: Surface | expr = qa.FLtzavx; unit = N/m^3
  pg2: PlotGroup2D "Magnetic flux density norm" | data = dset1
    surf1: Surface | readytoplot = on; expr = qa.Jez; unit = A/m^2