// COMSOL Multiphysics 4.3 (Build: 151) model "test_magnetic_harmonic_planar_nonlin.mph"
// Outline of the model tree

Functions
  int1: Interpolation
    funcs = {mur_nonlin, 1}
    source = table
    funcname = mur_nonlin
    table = 
      {0.000000, 0.000000}
      {13.898361, 0.227065}
      {27.796721, 0.454130}
      {42.396196, 0.681195}
      {59.399272, 0.908260}
      {82.380497, 1.135330}
      {144.669804, 1.362390}
      {897.632749, 1.589350}
      {4578.508772, 1.812360}
      {17772.655656, 2.010040}
      {41402.799806, 2.133160}
      {67334.477549, 2.199990}
      {94437.098456, 2.254790}
      {122015.076088, 2.299930}
      {155342.519059, 2.342510}
      {172087.005650, 2.378760}
      {213533.766176, 2.415010}
      {243831.341127, 2.451260}
      {247436.200588, 2.487500}
      {286905.205449, 2.523750}
      {339530.545263, 2.560000}
      {596831.036595, 3.000000}
      {1326291.192432, 5.000000}
      {2652582.384865, 10.000000}
      {7957747.154595, 20.000000}
    interp = linear
    extrap = const

Geometry
  geom1 "Geometry 1" (2D, length unit m)
    CO1: Composite "Composite Object 1" | filename = $FILENAME$_geom1_CO1.mphbin
    fin: Finalize "Form Union"

Physics
  emqa: InductionCurrents "Magnetic Fields" on all domains
    dependent variable A = {Ax, Ay, Az}
    al1: AmperesLaw "Ampère's Law 1" (default)
      sigma_mat = userdef
      sigma = 5e6
      epsilonr_mat = userdef
      epsilonr = 1
      mur_mat = userdef
      mur = diag{mur_nonlin(emqa.normB), mur_nonlin(emqa.normB), 1}
      normH_mat = userdef
      normH = 1/mu0_const*emqa.normB
      minput_frequency = freq
    mi1: MagneticInsulation (default)
    init1: init "Initial Values 1" (default) | A = {0, 0, x^2+y^2}
    ecd1: ExternalCurrentDensity on domains 1 | Je = {0, 0, 1e6}

Mesh
  mesh1 "Mesh 1"
    size: MeshSizeDefault | hmax = 4.69E-4; hmin = 2.1E-6; hcurve = 0.3; hnarrow = 1; hgrad = 1.3; hauto = 5
    obj: MeshObject | filename = $FILENAME$_mesh1_obj.mphbin
  mesh2 "Mesh 2"
    size: MeshSizeDefault | hmax = 4.69E-4; hmin = 2.1E-6; hcurve = 0.3; hnarrow = 1; hgrad = 1.3; hauto = 5
    ftri1: FreeTri "Free Triangular 1" on remaining entities

Studies
  std1 "Study 1"
    freq: Frequency "Frequency Domain" | plist = 50; mesh = {geom1, mesh1}

Solver configurations
  sol1 "Solver 1" (study std1)
    v1: Variables "Dependent Variables 1"
    s1: Stationary "Stationary Solver 1" | stol = 1.0E-3
      fcDef: FullyCoupled
      p1: Parametric | pname = freq; plistarr = 50; porder = linear
      d1: Direct
      prob1: SolverProblem "Information 1"
        error1: SolverError "Error 1"

Datasets
  dset1: Solution | solution = sol1
  rev1: Revolve2D "Revolution 2D 1" | data = dset1; genpoints = {{0, 0}, {0, 1}}; startangle = -90; revangle = 225

Plots
  pg1: PlotGroup2D "Magnetic flux density norm" | data = dset1
    surf1: Surface | readytoplot = off; expr = emqa.normB; unit = T