// COMSOL Multiphysics 4.3 (Build: 233) model "test_magnetic_steady_axisymmetric.mph"
// Outline of the model tree

Geometry
  geom1 "Geometry 1" (2D axisymmetric, length unit m)
    CO1: Rectangle | pos = 0.0,-0.02; size = {0.0090, 0.07}
    CO4: Composite "Composite Object 4" | filename = $FILENAME$_geom1_CO4.mphbin
    CO5: Composite "Composite Object 5" | filename = $FILENAME$_geom1_CO5.mphbin
    R1: Rectangle "Rectangle 1a" | pos = 0.03,0.052; size = {0.01, 0.026}
    R2: Composite "Composite Object 2" | filename = $FILENAME$_geom1_R2.mphbin
    fin: Finalize "Form Union"

Physics
  emqa: InductionCurrents "Magnetic Fields" on all domains
    dependent variable A = {Ar, Aphi, Az}
    al1: AmperesLaw "Ampère's Law 1" (default)
      sigma_mat = userdef
      sigma = 0
      epsilonr_mat = userdef
      epsilonr = 1
      ConstitutiveRelationH = RemanentFluxDensity
      Br = {0, 0, 0.6}
      mur_mat = userdef
      mur = diag{1.1, 1, 1.1}
      normH_mat = userdef
      normH = 1/mu0_const*emqa.normB
    axi1: AxialSymmetry (default)
    mi1: MagneticInsulation (default)
    init1: init "Initial Values 1" (default)
    al2: AmperesLaw "Ampère's Law 2" on domains 1, 5
      sigma_mat = userdef
      sigma = 0
      epsilonr_mat = userdef
      epsilonr = 1
      mur_mat = userdef
      mur = 1
      normH_mat = userdef
      normH = 1/mu0_const*emqa.normB
    al3: AmperesLaw "Ampère's Law 3" on domains 2-4
      sigma_mat = userdef
      sigma = 0
      epsilonr_mat = userdef
      epsilonr = 1
      mur_mat = userdef
      mur = diag{300, 1, 300}
      normH_mat = userdef
      normH = 1/mu0_const*emqa.normB
    ecd1: ExternalCurrentDensity on domains 5 | Je = {0, 2e6, 0}
    fcal1: ForceCalculation on domains 2 | ForceName = kotva

Mesh
  mesh1 "Mesh 1"
    size: MeshSizeDefault | hmax = 0.001; hauto = 1
    ftri1: FreeTri "Free Triangular 1" on remaining entities
      xscale = 1
      yscale = 1
      smoothcontrol = on
      smoothmaxiter = 8
      smoothmaxdepth = 8

Studies
  std1 "Study 1"
    stat: Stationary | mesh = {geom1, mesh1}

Solver configurations
  sol1 "Solver 1" (study std1)
    v1: Variables "Dependent Variables 1"
    s1: Stationary "Stationary Solver 1" | stol = 1.0E-6
      fc1: FullyCoupled | initstep = 1.0; minstep = 1.0e-4; rstep = 10.0
      d1: Direct
  sol2 "COMSOL 3.5a Solution" (study std1)

Datasets
  dset1: Solution | solution = sol1
  dset2: Solution | solution = sol2
  rev1: Revolve2D "Revolution 2D 1" | data = dset1; genpoints = {{0, 0}, {0, 1}}; startangle = -90; revangle = 225

Derived values
  gev1: EvalGlobal "Global Evaluation 1" | data = dset1; table = tbl1; expr = emqa.Forcez_kotva

Tables
  tbl1: Table
    // Global Evaluation 1 (emqa.Forcez_kotva)
    Electromagnetic force, z component (N)
    0.429771

Plots
  pg2: PlotGroup2D "Magnetic flux density norm" | data = dset1
    surf1: Surface | readytoplot = off; expr = emqa.normB; unit = T