// COMSOL Multiphysics 4.3 (Build: 233) model "test_magnetic_steady_axisymmetric_nonlin.mph"
// Outline of the model tree

Functions
  int1: Interpolation
    source = table
    funcname = mur
    table = 
      {0, 729.678}
      {0.170911, 982.941}
      {0.177249, 1008.92}
      {0.20487, 1119.05}
      {0.212115, 1146.74}
      {0.253777, 1289.7}
      {0.275513, 1357.53}
      {0.282755, 1378.93}
      {0.328941, 1508.03}
      {0.405909, 1696.32}
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
Geometry
  geom1 "Geometry 1" (2D axisymmetric, length unit m)
    CO1: Rectangle | pos = 0.0,-0.02; size = {0.0090, 0.07}
    CO4: Composite "Composite Object 4" | filename = $FILENAME$_geom1_CO4.mphbin
    CO5: Composite "Composite Object 5" | filename = $FILENAME$_geom1_CO5.mphbin
    R1: Rectangle "Rectangle 1a" | pos = 0.03,0.052; size = {0.01, 0.026}
    R2: Composite "Composite Object 2" | filename = $FILENAME$_geom1_R2.mphbin
    pt1: Point | p = {0.0043, 0.032}
    pt2: Point | p = {0.0199415, 0.0609942}
    fin: Finalize "Form Union"

Physics
  emqa: InductionCurrents "Magnetic Fields" on all domains
    dependent variable A = {Ar, Aphi, Az}
    al1: AmperesLaw "Ampère's Law 1" (default)
      sigma_mat = userdef
      sigma = 0
      epsilonr_mat = userdef
      epsilonr = 1
      ConstitutiveRelationH = RemanentFluxDensity
      Br = {0, 0, 0.6}
      mur_mat = userdef
      mur = diag{1.1, 1, 1.1}
      normH_mat = userdef
      normH = 1/mu0_const*emqa.normB
    axi1: AxialSymmetry (default)
    mi1: MagneticInsulation (default)
    init1: init "Initial Values 1" (default)
    al2: AmperesLaw "Ampère's Law 2" on domains 1, 5
      sigma_mat = userdef
      sigma = 0
      epsilonr_mat = userdef
      epsilonr = 1
      mur_mat = userdef
      mur = 1
      normH_mat = userdef
      normH = 1/mu0_const*emqa.normB
    al3: AmperesLaw "Ampère's Law 3" on domains 2-4
      sigma_mat = userdef
      sigma = 0
      epsilonr_mat = userdef
      epsilonr = 1
      mur_mat = userdef
      mur = diag{mur(emqa.normB), 1, mur(emqa.normB)}
      normH_mat = userdef
      normH = 1/mu0_const*emqa.normB
    ecd1: ExternalCurrentDensity on domains 5 | Je = {0, 2e6, 0}
    fcal1: ForceCalculation on domains 2 | ForceName = kotva

Mesh
  mesh1 "Mesh 1"
    size: MeshSizeDefault | hmax = 0.001; hauto = 1
    ftri1: FreeTri "Free Triangular 1" on remaining entities
      xscale = 1
      yscale = 1
      smoothcontrol = on
      smoothmaxiter = 8
      smoothmaxdepth = 8

Studies
  std1 "Study 1"
    stat: Stationary | mesh = {geom1, mesh1}

Solver configurations
  sol1 "Solver 1" (study std1)
    v1: Variables "Dependent Variables 1"
    s1: Stationary "Stationary Solver 1" | stol = 1.0E-7; nonlin = on
      fc1: FullyCoupled | initstep = 1.0; minstep = 1.0e-4; rstep = 10.0
      d1: Direct
  sol2 "COMSOL 3.5a Solution" (study std1)

Datasets
  dset1: Solution | solution = sol1
  dset2: Solution | solution = sol2
  rev1: Revolve2D "Revolution 2D 1" | data = dset1; genpoints = {{0, 0}, {0, 1}}; startangle = -90; revangle = 225

Derived values
  gev1: EvalGlobal "Global Evaluation 1" | data = dset1; table = new; expr = emqa.Forcer_kotva
  pev1: EvalPoint "Point Evaluation 1" on points 16 | data = dset1; table = new; expr = emqa.FLtzz
  int1: IntSurface "Surface Integration 1" on domains 5 | data = dset1; table = tbl1; expr = emqa.FLtzz; intvolume = on

Tables
  tbl1: Table
    // Surface Integration 1 (emqa.FLtzr)
    Lorentz force contribution, r component (N) | Lorentz force contribution, z component (N)
    -8.10165 | -5.50119

Plots
  pg2: PlotGroup2D "Magnetic flux density norm" | data = dset1
    surf1: Surface | readytoplot = on; expr = emqa.murzz; unit = 1