// COMSOL Multiphysics 4.3 (Build: 233) model "test_magnetic_steady_planar.mph"
// Outline of the model tree

Geometry
  geom1 "Geometry 1" (2D, length unit m)
    CO1: Rectangle | pos = -0.0,-0.5; size = {0.3, 0.18}
    R1: Composite "Composite Object 1" | filename = $FILENAME$_geom1_R1.mphbin
    R2: Rectangle | pos = -0.5,-0.2; size = {1, 0.05}
    fin: Finalize "Form Union"

Physics
  emqa: InductionCurrents "Magnetic Fields" on all domains
    dependent variable A = {Ax, Ay, Az}
    al1: AmperesLaw "Ampère's Law 1" (default)
      sigma_mat = userdef
      sigma = 0
      epsilonr_mat = userdef
      epsilonr = 1
      ConstitutiveRelationH = RemanentFluxDensity
      Br = {0.1*cos(-30/180*pi), 0.1*sin(-30/180*pi), 0}
      mur_mat = userdef
      mur = diag{1.11, 1.11, 1}
      normH_mat = userdef
      normH = 1/mu0_const*emqa.normB
    mi1: MagneticInsulation (default)
    init1: init "Initial Values 1" (default)
    al2: AmperesLaw "Ampère's Law 2" on domains 1, 3, 5
      sigma_mat = userdef
      sigma = 0
      epsilonr_mat = userdef
      epsilonr = 1
      mur_mat = userdef
      mur = 1
      normH_mat = userdef
      normH = 1/mu0_const*emqa.normB
    al3: AmperesLaw "Ampère's Law 3" on domains 2
      sigma_mat = userdef
      sigma = 1e7
      epsilonr_mat = userdef
      epsilonr = 1
      mur_mat = userdef
      mur = 1
      normH_mat = userdef
      normH = 1/mu0_const*emqa.normB
    al4: AmperesLaw "Ampère's Law 4" on domains 4
      sigma_mat = userdef
      sigma = 0
      epsilonr_mat = userdef
      epsilonr = 1
      mur_mat = userdef
      mur = diag{500, 500, 1}
      normH_mat = userdef
      normH = 1/mu0_const*emqa.normB
    ecd1: ExternalCurrentDensity on domains 5 | Je = {0, 0, 1e6}
    fcal1: ForceCalculation on domains 4 | ForceName = force

Mesh
  mesh1 "Mesh 1"
    size: MeshSizeDefault | hmax = 0.134; hmin = 6.0E-4; hcurve = 0.3; hnarrow = 1; hgrad = 1.3; hauto = 5
    obj: MeshObject | filename = $FILENAME$_mesh1_obj.mphbin

Studies
  std1 "Study 1"
    stat: Stationary | mesh = {geom1, mesh1}

Solver configurations
  sol1 "Solver 1" (study std1)
    v1: Variables "Dependent Variables 1"
    s1: Stationary "Stationary Solver 1" | stol = 1.0E-6
      fc1: FullyCoupled | initstep = 1.0; minstep = 1.0e-4; rstep = 10.0
      d1: Direct
  sol2 "COMSOL 3.5a Solution" (study std1)

Datasets
  dset1: Solution | solution = sol1
  dset2: Solution | solution = sol2

Derived values
  gev1: EvalGlobal "Global Evaluation 1" | data = dset1; table = tbl1; expr = emqa.Forcey_force

Tables
  tbl1: Table
    // Global Evaluation 1 (emqa.Forcex_force)
    Electromagnetic force, x component (N) | Electromagnetic force, y component (N)
    2.66141 | -11.8753

Plots
  pg2: PlotGroup2D "Magnetic flux density norm" | data = dset1
    surf1: Surface | readytoplot = off; expr = emqa.normB; unit = T