// COMSOL Multiphysics 4.3 (Build: 233) model "test_magnetic_transient_axisymmetric.mph"
// Outline of the model tree

Geometry
  geom1 "Geometry 1" (2D axisymmetric, length unit m)
    imp1: Import | filename = /home/karban/xxx.dxf
    pt1: Point | p = {5.340e-02, -2.316e-02}
    fin: Finalize "Form Union"

Materials
  mat1 "Material 1" on domains 1, 3
    def "Basic"
      electricconductivity = 0
      relpermittivity = 1
      relpermeability = 1
  mat2 "Material 2" on domains 2
    def "Basic"
      electricconductivity = 57e6
      relpermittivity = 1
      relpermeability = 1

Physics
  mf: InductionCurrents "Magnetic Fields" on all domains
    dependent variable A = {Ar, Aphi, Az}
    al1: AmperesLaw "Ampère's Law 1" (default)
    axi1: AxialSymmetry (default)
    mi1: MagneticInsulation (default)
    init1: init "Initial Values 1" (default)
    mi2: MagneticInsulation on boundaries 11, 12
    ecd1: ExternalCurrentDensity on domains 3 | Je = {0, 1e7*(exp(-10/0.7*t) - exp(-12/0.7*t)), 0}

Mesh
  mesh1 "Mesh 1" (physics-controlled)
    size: MeshSizeDefault | hauto = 1

Studies
  std1 "Study 1"
    time: Transient "Time Dependent" | tlist = range(0,0.3/10,0.3)

Solver configurations
  sol1 "Solver 1" (study std1)
    v1: Variables "Dependent Variables 1"
    t1: Time "Time-Dependent Solver 1"
      tlist = range(0,0.3/10,0.3)
      atolglobal = 0.0005
      timemethod = genalpha
      maxstepgenalpha = 0.01
      predictor = linear
      dDef: Direct
      fc1: FullyCoupled

Datasets
  dset1: Solution | solution = sol1
  rev1: Revolve2D "Revolution 2D 1" | data = dset1; genpoints = {{0, 0}, {0, 1}}; startangle = -90; revangle = 225

Derived values
  pev1: EvalPoint "Point Evaluation 1" on points 6 | data = dset1; table = new; expr = mf.Jiphi
  int1: IntSurface "Surface Integration 1" on domains 2 | data = dset1; table = tbl1; expr = mf.Qrh; intvolume = on

Tables
  tbl1: Table
    // Surface Integration 1 (mf.Wm)
    Time | Magnetic energy density (J) | Resistive losses (W)
    0.3 | 0.031853 | 0.360629

Plots
  pg1: PlotGroup2D "Magnetic flux density norm" | data = dset1; animating = off
    surf1: Surface | readytoplot = on; expr = mf.Wm; unit = J/m^3
  pg2: PlotGroup1D "1D Plot Group 2" | data = none

Exports
  play1: Player