// COMSOL Multiphysics 4.4.0.195 model "math_coeff_planar.mph"
// Outline of the model tree

Geometry
  geom1 "Geometry 1" (2D, length unit m)
    imp1: Import | filename = /home/karban/xxx.dxf; knit = solid
    pt1: Point | p = {-6.800e-01, -2.526e-02}
    fin: Finalize "Form Union" | action = union; imprint = off; splitpairs = off

Physics
  c: CoefficientFormPDE on domains 1
    dependent variable u
    cfeq1: CoefficientFormPDE (default) | c = {2, 0, 0, 2}; a = 3; f = 5; da = 1; be = {1, 2}
    zflx1: ZeroFluxBoundary "Zero Flux 1" (default)
    init1: init "Initial Values 1" (default)
    dir1: DirichletBoundary "Dirichlet Boundary Condition 1" on boundaries 4-10 | r = 1
    flux1: FluxBoundary "Flux/Source 1" on boundaries 1-3, 11, 12 | g = 10

Mesh
  mesh1 "Mesh 1" (physics-controlled)
    size: MeshSizeDefault | hauto = 1

Studies
  std1 "Study 1"
    stat: Stationary

Solver configurations
  sol1 "Solver 1" (study std1)
    v1: Variables "Dependent Variables 1"
    s1: Stationary "Stationary Solver 1"
      dDef: Direct
      fc1: FullyCoupled | linsolver = dDef

Datasets
  dset1: Solution | solution = sol1

Derived values
  int1: IntSurface "Surface Integration 1" on domains 1 | data = dset1; table = tbl1; expr = u
  int2: IntLine "Line Integration 2" on boundaries 1-3, 11, 12 | data = dset1; table = tbl2; expr = dflux.u
  pev1: EvalPoint "Point Evaluation 1" on points 4 | data = dset1; table = tbl3; expr = uy

Tables
  tbl1: Table
    // Surface Integration 1 (u)
    Dependent variable u (m^2) | Dependent variable u (m^2)
    0 | 7.07878
  tbl2: Table
    // Line Integration 2 (c.g_u)
    Boundary flux/source (1) | Boundary flux down direction (1) | 2*dflux.u (1)
    59.985 | 59.985 | 119.97
  tbl3: Table
    // Point Evaluation 1 (u)
    Dependent variable u (1), Point: 4 | Gradient of u, x component (1/m), Point: 4 | Gradient of u, y component (1/m), Point: 4
    3.1225 | -4.84176 | -9.53723

Plots
  pg1: PlotGroup2D "2D Plot Group 1" | data = dset1
    surf1: Surface | expr = u