// COMSOL Multiphysics 4.4.0.248 model "test_math_coeff_transient_axisymmetric.mph"
// Outline of the model tree

Geometry
  geom1 "Geometry 1" (2D axisymmetric, length unit m)
    imp1: Import | filename = /home/karban/xxx.dxf
    pt1: Point | p = {9.386e-01, 1.147e-01}
    fin: Finalize "Form Union"

Physics
  c: CoefficientFormPDE on all domains
    dependent variable u
    cfeq1: CoefficientFormPDE (default) | c = {5, 0, 0, 5}; a = 2; f = -5; ea = 1; da = 2; be = {5, 8}
    zflx1: ZeroFluxBoundary "Zero Flux 1" (default)
    init1: init "Initial Values 1" (default)
    cfeq2: CoefficientFormPDE on domains 2 | c = {3, 0, 0, 3}; f = 0; ea = 1; da = 4; be = {-3, 4}
    flux1: FluxBoundary "Flux/Source 1" on boundaries 1, 2, 4, 5, 8, 9
    dir1: DirichletBoundary "Dirichlet Boundary Condition 1" on boundaries 3 | r = 0; useDirichletCondition = 1
    dir2: DirichletBoundary "Dirichlet Boundary Condition 2" on boundaries 7 | r = 1.0*sin(2*pi*1.0/5*t)

Mesh
  mesh1 "Mesh 1" (physics-controlled)
    size: MeshSizeDefault | hauto = 2

Studies
  std1 "Study 1"
    time: Transient "Time Dependent" | tlist = range(0,4/19,4)

Solver configurations
  sol1 "Solver 1" (study std1)
    v1: Variables "Dependent Variables 1"
    t1: Time "Time-Dependent Solver 1" | tlist = range(0,4/19,4)
      dDef: Direct
      fc1: FullyCoupled | linsolver = dDef; dtech = auto

Datasets
  dset1: Solution | solution = sol1
  rev1: Revolve2D "Revolution 2D 1" | data = dset1; genpoints = {{0, 0}, {0, 1}}; startangle = -90; revangle = 225
  cpl1: CutPlane
    data = rev1
    planetype = general
    genmethod = threepoint
    genpoints = {{0.204127, -2.2465E-4, 0.475}, {1.00414, -0.600225, 0.475}, {0.512827, 0.411372, 1.33248}}

Derived values
  pev1: EvalPoint "Point Evaluation 1" on points 7 | data = dset1; table = tbl1; expr = uz
  int1: IntSurface "Surface Integration 1" on domains 2 | data = dset1; table = tbl2; expr = u; intvolume = on
  int2: IntLine "Line Integration 2" on boundaries 7 | data = dset1; table = tbl3; expr = dflux.u; intsurface = on

Tables
  tbl1: Table
    // Point Evaluation 1 (u)
    Time (s) | Dependent variable u (1), Point: 7 | Gradient of u, r component (1/m), Point: 7 | Gradient of u, z component (1/m), Point: 7
    4 | -0.915716 | 0.0453588 | 0.170109
  tbl2: Table
    // Surface Integration 1 (u)
    Time (s) | Dependent variable u (m^3)
    4 | -4.29455
  tbl3: Table
    // Line Integration 2 (c.g_u)
    Time (s) | 3*(tz*ur-tr*uz) (m) | Boundary flux down direction (m)
    4 | -1.3097 | 1.33109

Plots
  pg1: PlotGroup2D "2D Plot Group 1" | data = dset1
    surf1: Surface
      data = dset1
      cutmode = off
      cutplane = cpl1
      listen = on
      planefirst = {-0.51605156334, -0.960462541997, 1.19517842205}
      planesecond = {0.924305233079, 0.960013242184, -0.245178374368}
      planeisinit = on
      expr = u