// COMSOL Multiphysics 4.4.0.248 model "test_math_coeff_transient_planar.mph"
// Outline of the model tree

Geometry
  geom1 "Geometry 1" (2D, length unit m)
    imp1: Import | filename = /home/karban/xxx.dxf
    fin: Finalize "Form Union"

Physics
  c: CoefficientFormPDE on domains 1
    dependent variable u
    cfeq1: CoefficientFormPDE (default) | c = {3, 0, 0, 3}; a = 4; f = 5; ea = 300; da = 280; be = {2, -2}
    zflx1: ZeroFluxBoundary "Zero Flux 1" (default)
    init1: init "Initial Values 1" (default)
    dir1: DirichletBoundary "Dirichlet Boundary Condition 1" on boundaries 9-12 | r = exp(-10/5*t) - exp(-20/5*t)
    dir2: DirichletBoundary "Dirichlet Boundary Condition 2" on boundaries 4-8 | r = sin(2*pi*0.5/0.75*t)

Mesh
  mesh1 "Mesh 1"
    size: MeshSizeDefault | hmax = 0.004; hauto = 2; custom = on
    ftri1: FreeTri "Free Triangular 1" on remaining entities
      xscale = 1
      yscale = 1
      smoothcontrol = on
      smoothmaxiter = 8
      smoothmaxdepth = 8

Studies
  std1 "Study 1"
    time: Transient "Time Dependent" | tlist = range(0,1.1/9,1.1)

Solver configurations
  sol1 "Solver 1" (study std1)
    v1: Variables "Dependent Variables 1"
    t1: Time "Time-Dependent Solver 1" | tlist = range(0,1.1/9,1.1)
      dDef: Direct
      fc1: FullyCoupled | linsolver = dDef; dtech = const

Datasets
  dset1: Solution | solution = sol1

Plots
  pg1: PlotGroup2D "2D Plot Group 1" | data = dset1
    surf1: Surface | expr = u